# OpenSim document version 40000
Model panda:
  credits: Autogenerated using urdf_to_osim
  Ground
  BodySet:
    Body link0: mass=1.937868 [kg] mass_center=(-0.025566 -2.88e-5 0.057332) inertia=(1 1 1 0 0 0)
        meshes=meshes/visual/link0.stl
    Body link1: mass=4.970684 mass_center=(0 -0.0324958 -0.0675818)
        inertia=(0.5511213 0.5543082 0.009020836 -9.891703e-5 0.003401255 0.0173588) meshes=meshes/visual/link1.stl
    Body link2: mass=0.646926 mass_center=(0 -0.06861 0.0322285)
        inertia=(0.007420488 0.02809572 0.02545501 -0.003866641 0.0102469 0.0006390639) meshes=meshes/visual/link2.stl
    Body link3: mass=3.228604 mass_center=(0.0469893 0.0316374 -0.031704)
        inertia=(0.01798907 0.01943162 0.003410798 -0.001273667 -0.01730435 -0.02123274) meshes=meshes/visual/link3.stl
    Body link4: mass=3.587895 mass_center=(-0.0360446 0.0336853 0.031882)
        inertia=(-0.01597127 0.00670457 -0.02094015 -0.01212384 -0.006569355 0.01892649) meshes=meshes/visual/link4.stl
    Body link5: mass=1.225946 mass_center=(0 0.0610427 -0.104176)
        inertia=(0.03167043 0.02748763 0.006384489 -0.002718756 -0.003473754 -0.001706052)
        meshes=meshes/visual/link5.stl
    Body link6: mass=1.666555 mass_center=(0.0510509 0.009108 0.0106343)
        inertia=(0.00144754 -0.001859766 -0.0009285602 -0.001306111 -0.002212241 0.0005884309)
        meshes=meshes/visual/link6.stl
    Body link7: mass=0.735522 mass_center=(0.0109695 0.0107965 0.0650411)
        inertia=(0.009711992 0.007154935 0.004720348 -0.0004608913 -0.0007195173 -0.0009336409)
        meshes=meshes/visual/link7.stl
    Body link8: mass=Inf mass_center=(0 0 0) inertia=(0 0 0 0 0 0) meshes=meshes/visual/link8.stl
  JointSet:
    PinJoint joint-1: socket_parent_frame=ground_offset socket_child_frame=link0_offset
      Coordinate joint-1_coord_0
      PhysicalOffsetFrame ground_offset: socket_parent=/ground translation=(0 0 0) [meters]
      PhysicalOffsetFrame link0_offset: socket_parent=/bodyset/link0 translation=(0 0 0)
    PinJoint joint0: socket_parent_frame=link0_offset socket_child_frame=link1_offset
      Coordinate joint0_coord_0
      PhysicalOffsetFrame link0_offset: socket_parent=/bodyset/link0 translation=(0 0 0.333)
      PhysicalOffsetFrame link1_offset: socket_parent=/bodyset/link1 translation=(0 0 0)
    PinJoint joint1: socket_parent_frame=link1_offset socket_child_frame=link2_offset
      Coordinate joint1_coord_0
      PhysicalOffsetFrame link1_offset: socket_parent=/bodyset/link1 translation=(0 0 0)
          orientation=(-1.570796 0 0) [radians]
      PhysicalOffsetFrame link2_offset: socket_parent=/bodyset/link2 translation=(0 0 0)
    PinJoint joint2: socket_parent_frame=link2_offset socket_child_frame=link3_offset
      Coordinate joint2_coord_0
      PhysicalOffsetFrame link2_offset: socket_parent=/bodyset/link2 translation=(0 -0.316 0)
          orientation=(1.570796 0 0)
      PhysicalOffsetFrame link3_offset: socket_parent=/bodyset/link3 translation=(0 0 0)
    PinJoint joint3: socket_parent_frame=link3_offset socket_child_frame=link4_offset
      Coordinate joint3_coord_0
      PhysicalOffsetFrame link3_offset: socket_parent=/bodyset/link3 translation=(0.0825 0 0)
          orientation=(1.570796 0 0)
      PhysicalOffsetFrame link4_offset: socket_parent=/bodyset/link4 translation=(0 0 0)
    PinJoint joint4: socket_parent_frame=link4_offset socket_child_frame=link5_offset
      Coordinate joint4_coord_0
      PhysicalOffsetFrame link4_offset: socket_parent=/bodyset/link4 translation=(-0.0825 0.384 0)
          orientation=(-1.570796 0 0)
      PhysicalOffsetFrame link5_offset: socket_parent=/bodyset/link5 translation=(0 0 0)
    PinJoint joint5: socket_parent_frame=link5_offset socket_child_frame=link6_offset
      Coordinate joint5_coord_0
      PhysicalOffsetFrame link5_offset: socket_parent=/bodyset/link5 translation=(0 0 0) orientation=(1.570796 0 0)
      PhysicalOffsetFrame link6_offset: socket_parent=/bodyset/link6 translation=(0 0 0)
    PinJoint joint6: socket_parent_frame=link6_offset socket_child_frame=link7_offset
      Coordinate joint6_coord_0
      PhysicalOffsetFrame link6_offset: socket_parent=/bodyset/link6 translation=(0.088 0 0) orientation=(1.570796 0 0)
      PhysicalOffsetFrame link7_offset: socket_parent=/bodyset/link7 translation=(0 0 0)
    PinJoint joint7: socket_parent_frame=link7_offset socket_child_frame=link8_offset
      Coordinate joint7_coord_0
      PhysicalOffsetFrame link7_offset: socket_parent=/bodyset/link7 translation=(0 0 0.107)
      PhysicalOffsetFrame link8_offset: socket_parent=/bodyset/link8 translation=(0 0 0)
  ForceSet:
    CoordinateActuator joint-1_actuator: coordinate=joint-1_coord_0 optimal_force=100
    CoordinateActuator joint0_actuator: coordinate=joint0_coord_0 optimal_force=100
    CoordinateActuator joint1_actuator: coordinate=joint1_coord_0 optimal_force=100
    CoordinateActuator joint2_actuator: coordinate=joint2_coord_0 optimal_force=100
    CoordinateActuator joint3_actuator: coordinate=joint3_coord_0 optimal_force=100
    CoordinateActuator joint4_actuator: coordinate=joint4_coord_0 optimal_force=100
    CoordinateActuator joint5_actuator: coordinate=joint5_coord_0 optimal_force=100
    CoordinateActuator joint6_actuator: coordinate=joint6_coord_0 optimal_force=100
    CoordinateActuator joint7_actuator: coordinate=joint7_coord_0 optimal_force=100
