# OpenSim document version 40000
Model arm:
  credits: Martin Androvich
  Ground
  BodySet:
    Body humerus: mass=1 [kg] mass_center=(0 0 0) inertia=(0 0 0 0 0 0)
      PhysicalOffsetFrame humerusCenter: socket_parent=.. translation=(0 0.5 0) [meters]
        Ellipsoid humerusCenter_geom_1: radii=(0.1 0.5 0.1)
    Body radius: mass=1 mass_center=(0 0 0) inertia=(0 0 0 0 0 0)
      PhysicalOffsetFrame radiusCenter: socket_parent=.. translation=(0 0.5 0)
        Ellipsoid radiusCenter_geom_1: radii=(0.1 0.5 0.1)
  JointSet:
    PinJoint shoulder: socket_parent_frame=ground_offset socket_child_frame=humerus_offset
      Coordinate shoulder_coord_0
      PhysicalOffsetFrame ground_offset: socket_parent=/ground translation=(0 0 0)
      PhysicalOffsetFrame humerus_offset: socket_parent=/bodyset/humerus translation=(0 1 0)
    PinJoint elbow: socket_parent_frame=humerus_offset socket_child_frame=radius_offset
      Coordinate elbow_coord_0
      PhysicalOffsetFrame humerus_offset: socket_parent=/bodyset/humerus translation=(0 0 0)
      PhysicalOffsetFrame radius_offset: socket_parent=/bodyset/radius translation=(0 1 0)
