# OpenSim document version 40000
Model panda:
  credits: Martin Androvich
  Ground
  BodySet:
    Body link0: mass=1.92 [kg] mass_center=(-0.025566 -2.88e-5 0.057332) inertia=(0 0 0 0 0 0)
        meshes=meshes/visual/link0.stl
    Body link1: mass=4.970684 mass_center=(0 -0.0324958 -0.0675818)
        inertia=(0.5511213 0.5543082 0.009020836 -9.891703e-5 0.003401255 0.0173588) meshes=meshes/visual/link1.stl
    Body link2: mass=0.646926 mass_center=(0 -0.06861 0.0322285) inertia=(0 0 0 0 0 0) meshes=meshes/visual/link2.stl
    Body link3: mass=3.228604 mass_center=(0.0469893 0.0316374 -0.031704) inertia=(0 0 0 0 0 0)
        meshes=meshes/visual/link3.stl
  JointSet:
    WeldJoint world_to_link0: socket_parent_frame=ground_offset socket_child_frame=link0_offset
      PhysicalOffsetFrame ground_offset: socket_parent=/ground translation=(0 0 0) [meters]
          orientation=(-1.570796 0 0) [radians]
      PhysicalOffsetFrame link0_offset: socket_parent=/bodyset/link0 translation=(0 0 0)
    PinJoint joint0: socket_parent_frame=link0_offset socket_child_frame=link1_offset
      Coordinate joint0_coord_0
      PhysicalOffsetFrame link0_offset: socket_parent=/bodyset/link0 translation=(0 0 0.333)
      PhysicalOffsetFrame link1_offset: socket_parent=/bodyset/link1 translation=(0 0 0)
    PinJoint joint1: socket_parent_frame=link1_offset socket_child_frame=link2_offset
      Coordinate joint1_coord_0
      PhysicalOffsetFrame link1_offset: socket_parent=/bodyset/link1 translation=(0 0 0) orientation=(-1.570796 0 0)
      PhysicalOffsetFrame link2_offset: socket_parent=/bodyset/link2 translation=(0 0 0)
    PinJoint joint2: socket_parent_frame=link2_offset socket_child_frame=link3_offset
      Coordinate joint2_coord_0
      PhysicalOffsetFrame link2_offset: socket_parent=/bodyset/link2 translation=(0 -0.316 0)
          orientation=(1.570796 0 0)
      PhysicalOffsetFrame link3_offset: socket_parent=/bodyset/link3 translation=(0 0 0)
  ControllerSet:
    PDController pd_controller: actuator_list=joint0_actuator
  ForceSet:
    ElasticFoundationForce contact_force:
      ContactParametersSet contact_parameters:
        ContactParameters: geometry=(link0_contact link1_contact link3_contact) stiffness=10000000 dissipation=0.1
            static_friction=1.05 dynamic_friction=1.4 viscous_friction=1
    CoordinateActuator joint0_actuator: coordinate=joint0_coord_0 optimal_force=87
  ContactGeometrySet:
    ContactMesh link0_contact: socket_frame=/bodyset/link0 location=(0 0 0) filename=meshes/collision/link0.stl
    ContactMesh link1_contact: socket_frame=/bodyset/link1 location=(0 0 0) filename=meshes/collision/link1.stl
    ContactMesh link3_contact: socket_frame=/bodyset/link3 location=(0 0 0) filename=meshes/collision/link3.stl
